// COMSOL Multiphysics 6.1.0.357 model "Hg_glow_discharge_light.mph"
// DC Glow Discharge
// DC glow discharges in the low-pressure regime have long been used for gas lasers and fluorescent lamps. DC discharges are attractive to study because the solution is time independent. This 2D model shows how to use the DC Discharge interface to set up an analysis of a positive column. The discharge is sustained by emission of secondary electrons at the cathode.
// Outline of the model tree

Parameters
  V0 = 425 [V]  // Applied voltage

Variables
  var1 "Variables 1"
    Wf = 5  // Work function
    p0 = 0.5[torr]  // Gas pressure

Selections
  sel1: Explicit "Cathode" on boundaries 4-6, 10
  sel2: Explicit "Anode" on boundaries 7-9, 11
  sel3: Explicit "Walls" on boundaries 2, 3, 12
  sel4: Explicit "All Walls" on boundaries 2-12
  sel5: Explicit "Non Cathode Walls" on boundaries 2, 3, 7-9, 11, 12

Geometry
  geom1 "Geometry 1" (2D axisymmetric, length unit m)
    r1: Rectangle | size = {0.05*0.24, 0.4}
    r2: Rectangle | pos = {0.005, 0.01}; size = {0.0375*0.24*0.05, 6e-3}
    r3: Rectangle | pos = {0.005, 0.384}; size = {0.0375*0.24*0.05, 6e-3}
    co1: Compose | input = r1, r2, r3; formula = r1-r2-r3
    ls1: LineSegment | specify1 = coord; coord1 = {0, 0.02}; specify2 = coord; coord2 = {0.0375*0.24, 0.02}
    fin: Finalize "Form Union"
    mce1: MeshControlEdges | input = fin(1) boundaries 4

Physics
  plas: ColdPlasma "Plasma" on all domains
    dependent variable Ne
    TransportSettings.calcThermo = 1
    TransportSettings.fullDiffusivity = 0
    TransportSettings.Convection = 1
    ElectronProperties.ReducedProps = 1
    ElectronProperties.IncludeThermalDiffusion = 1
    EEDFSettings.g = 2
    EEDFSettings.eedf = Maxwellian
    xsec1: CrossSectionImport | Filepath = Ar_xsecs.txt
    eir1: ElectronImpactReaction "1: e+Hg=>e+Hg" on all domains
      formula = e+Hg=>e+Hg
      mratio = 0.136E-04/80
      xdata = {0.0, 0.005, 0.01, 0.015, 0.02, 0.03, 0.04, 0.05, 0.06, 0.07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}
      ydata = {1.37E-19, 1.38E-19, 1.39E-19, 1.42E-19, 1.5E-19, 1.65E-19, 1.8E-19, 2.05E-19, 2.3E-19, 2.65E-19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}
    eir2: ElectronImpactReaction "2: e+Hg=>e+Hg1" on all domains
      formula = e+Hg=>e+Hg1
      de = 4.66
      SpecifyReactionUsing = UseCrossSectionData
      xdata = {4.667, 4.7, 4.8, 4.9, 5.0, 5.1, 5.2, 5.3, 5.4, 5.5, 5.6, 5.7, 5.8, 5.9, 6.0, 6.25, 6.5, 7.0, 7.25, 7.5, 10.0, 12.0, 15.0, 20.0, 30.0, 100.0, 1000.0, 100000.0}
      ydata = {0.0, 1.0E-21, 6.0E-21, 2.5E-21, 3.0E-21, 4.0E-21, 5.5E-21, 6.8E-21, 8.5E-21, 9.5E-21, 9.5E-21, 9.0E-21, 8.5E-21, 7.5E-21, 7.0E-21, 6.5E-21, 6.0E-21, 5.0E-21, 4.8E-21, 4.5E-21, 1.5E-21, 9.0E-22, 4.4E-22, 1.9E-22, 5.0E-23, 1.5E-24, 5.0E-26, 1.0E-30}
      RateConstantForm = UseTownsend
      xtownratedata = {0, 0.1, 0.105986981888, 0.112332403298, 0.119057723938, 0.126185688307, 0.133740402611, 0.141747416293, 0.150233808433, 0.159228279334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}
      ytownratedata = {0, 3.86284614599e-45, 4.68640623719e-45, 5.97901704183e-45, 8.03168932212e-45, 1.13609413461e-44, 1.69068199014e-44, 2.64253488583e-44, 4.328427214993E-44, 7.41132363786e-44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}
    eir3: ElectronImpactReaction "3: e+Hg1=>e+Hg" on all domains
      formula = e+Hg1=>e+Hg
      de = 4.66
      xdata = {0.007, 0.04, 0.14, 0.24, 0.34, 0.44, 0.54, 0.64, 0.74, 0.84, 0.94, 1.04, 1.14, 1.24, 1.34, 1.59, 1.84, 2.34, 2.59, 2.84, 5.34, 7.34, 10.34, 15.34, 25.34, 95.34, 995.34, 99995.34}
      ydata = {0.0, 1.175e-19, 2.05714285714e-19, 5.10416666667e-20, 4.41176470588e-20, 4.63636363636e-20, 5.2962962963e-20, 5.63125e-20, 6.2027027027e-20, 6.22023809524e-20, 5.65957446809e-20, 4.93269230769e-20, 4.32456140351e-20, 3.5685483871e-20, 3.13432835821e-20, 2.55503144654e-20, 2.11956521739e-20, 1.49572649573e-20, 1.34362934363e-20, 1.18838028169e-20, 2.80898876404e-21, 1.47138964578e-21, 6.3829787234e-22, 2.47718383312e-22, 5.91949486977e-23, 1.57331655129e-24, 5.02340908634e-26, 1.00004660217e-30}
    eir4: ElectronImpactReaction "4: e+Hg=>2e+Hg+" on all domains
      formula = e+Hg=>2e+Hg+
      de = 10.44
      SpecifyReactionUsing = UseCrossSectionData
      xdata = {10.4375, 15.0, 17.5, 20.0, 25.0, 30.0, 35.0, 40.0, 45.0, 50.0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}
      ydata = {0.0, 1.13E-20, 2.47E-20, 2.68E-20, 3.79E-20, 4.5E-20, 5.09E-20, 5.44E-20, 5.75E-20, 5.95E-20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}
      RateConstantForm = UseTownsend
      xtownratedata = {0, 0.1, 0.105986981888, 0.112332403298, 0.119057723938, 0.126185688307, 0.133740402611, 0.141747416293, 0.150233808433, 0.159228279334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}
      ytownratedata = {0, -4.04026211251e-52, -4.90164734714e-52, -6.25362624116e-52, -8.40057533776e-52, -1.18827359798e-51, -1.76833301946e-51, -2.76390339576e-51, -4.52722677076e-51, -7.75171698946e-51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}
    eir5: ElectronImpactReaction "5: e+Hg1=>2e+Hg+" on all domains
      formula = e+Hg1=>2e+Hg+
      de = 10.44-4.66
      xdata = {5.7775, 10.34, 12.84, 15.34, 20.34, 25.34, 30.34, 35.34, 40.34, 45.34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}
      ydata = {0.0, 1.13E-20, 2.47E-20, 2.68E-20, 3.79E-20, 4.5E-20, 5.09E-20, 5.44E-20, 5.75E-20, 5.95E-20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}
    eir6: ElectronImpactReaction "9: e+Hg1=>2e+Hg+" (disabled) on all domains
      formula = e+Hg1=>2e+Hg+
      de = 10.44-4.66
      xdata = {5.7775, 10.34, 12.84, 15.34, 20.34, 25.34, 30.34, 35.34, 40.34, 45.34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}
      ydata = {0.0, 1.13E-20, 2.47E-20, 2.68E-20, 3.79E-20, 4.5E-20, 5.09E-20, 5.44E-20, 5.75E-20, 5.95E-20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}
    rxn1: Reaction "6: Hg1+Hg1=>e+Hg+Hg+" on all domains | formula = Hg1+Hg1=>e+Hg+Hg+; kf = 3.734E8
    rxn2: Reaction "7: Hg1+Hg=>Hg+Hg" on all domains | formula = Hg1+Hg=>Hg+Hg; kf = 1807
    e: Species "Species: e" on all domains
      specName = e
      specLabel = e
      sType = electron
      sisDef = 1
      PresetSpeciesData = UserDefined
      M = 0.04[kg/mol]
      sigma = 3.3[angstrom]
      epsilonkb = 93.3[K]
      mu = 0.000[C*m]
      Dfs = 1E-4[m^2/s]
      x0 = 1E-8
      n0 = 1E13[1/m^3]
      Tlo = 300[K]
      Tmid = 1000[K]
      Thi = 5000[K]
      MobilityDiffusivitySpecification = ComputeMobilityAndDiffusivity
      IonTemperatureSpecification = UseGasForIonTemperature
      Tion = 300[K]
      MobilitySpecification = SpecifyConstantMobility
      um = 20[m^2/(V*s)]
      alphap = 1.64[angstrom^3]
      sighf = 7e-19[m^2]
      MobilityEFieldSpecification = EfieldVMobilityData
    Hg: Species "Species: Hg" on all domains | FromMassConstraint = 1; PresetSpeciesData = UserDefined; M = 0.2[kg/mol]
    Hg1: Species "Species: Hg1" on all domains | PresetSpeciesData = UserDefined; M = 0.2[kg/mol]
    Hg_1p: Species "Species: Hg+" on all domains | InitIon = 1; PresetSpeciesData = UserDefined; M = 0.2[kg/mol]
    Hg2: Species "Species: Hg2" on all domains
      specName = Hg2
      specLabel = Hg2
      sType = neutral
      sisDef = 1
      PresetSpeciesData = UserDefined
      M = 0.04[kg/mol]
      sigma = 3.3[angstrom]
      epsilonkb = 93.3[K]
      mu = 0.000[C*m]
      Dfs = 1E-4[m^2/s]
      x0 = 1E-8
      n0 = 1E13[1/m^3]
      Tlo = 300[K]
      Tmid = 1000[K]
      Thi = 5000[K]
      MobilityDiffusivitySpecification = ComputeMobilityAndDiffusivity
      IonTemperatureSpecification = UseGasForIonTemperature
      Tion = 300[K]
      MobilitySpecification = SpecifyConstantMobility
      um = 20[m^2/(V*s)]
      alphap = 1.64[angstrom^3]
      sighf = 7e-19[m^2]
      MobilityEFieldSpecification = EfieldVMobilityData
    sr1: SurfaceReaction "1: Hg+=>Hg" on selection sel1 | formula = Hg+=>Hg; gammai = 0.25; ebari = plas.de_4 - 2*Wf
    sr2: SurfaceReaction "2: Hg+=>Hg" on selection sel5 | formula = Hg+=>Hg; gammaf = 1; gammai = 0; ebari = 0
    pes1: PlasmaEsModel "Plasma Model 1" (default)
      pA = p0
      muN = mueN
      SpecifyElectronDensityAndEnergy = FromElectronImpact
    init1: InitialValues (default)
    zc1: ZeroCharge (default)
    ins1: Insulation (default)
    axi1: AxialSymmetry (default)
    wall1: WallDriftDiffusion "Wall 1" on boundaries 2, 3, 7-9, 11, 12 | re = 0.25; incmig = 0; th_ebar = 0.026
    gnd1: Ground on selection sel1
    mct1: MetalContact on selection sel2 | V0 = V0; CircuitType = BallastResistor; Rb = 3520[ohm]
    dct1: DielectricContact on selection sel3
      SurfaceChargeTypeSection = SurfaceChargeAccumulation
      EnableDistributedCapacitance = 0
    wall2: WallDriftDiffusion "Cathode" on selection sel1 | re = 0; incmig = 0; th_ebar = 0

Mesh
  mesh1 "Mesh 1"
    size: MeshSizeDefault | hmax = 0.0012; hauto = 1; custom = on
    size1: Size on boundaries 2-12 | table = plasma; hmax = 0.0024; hmin = 2.0E-4; hcurve = 0.2; hauto = 1
    ftri1: FreeTri "Free Triangular 1" on remaining entities
    bl1: BndLayer "Boundary Layers 1" on domains 1
      blp1: BndLayerProp "Boundary Layer Properties 1" on boundaries 2-12
        blnlayers = 5
        blstretch = 1.4
        blhmin = 0.000153486332408
        blhtot = 0.00168

Studies
  std1 "Study 1"
    param: Parametric "Parametric Sweep" | pname = V0; plistarr = range(600,-50,50); punit = V; reusesol = on
    time: Transient "Time Dependent" | tlist = 0 10^{range(-8,0.4,0)}

Solver configurations
  sol1 "Solution 1" (study std1)
    v1: Variables "Dependent Variables 1"
    t1: Time "Time-Dependent Solver 1"
      tlist = 0 10^{range(-8,0.4,0)}
      rtol = 0.001
      atolglobalmethod = unscaled
      atolglobalvaluemethod = manual
      initialstepbdf = (1.0E-13)[s]
      maxorder = 2
      estrat = exclude
      fc1: FullyCoupled | linsolver = d1; jtech = once
      d1: Direct | linsolver = pardiso
  sol43 "Parametric Solutions 7" (study std1)

Datasets
  cpt1: CutPoint2D "Cut Point center" | data = dset8; pointx = 0; pointy = 0.2
  cpt2: CutPoint2D "Cut Point border" | data = dset8; pointx = 0.012; pointy = 0.2
  dset3: Solution | solution = sol1
  dset8: Solution | solution = sol43

Derived values
  int1: IntSurface "Surface Integration 1" on all domains | data = dset8; table = tbl1; expr = plas.Pcap; intvolume = on

Tables
  tbl1: Table
    // Surface Integration 1
    V0 (V) | Time (s) | plas.Jelz*V0 (kg*m^3/s^3) | Capacitive power deposition (W)
    600 | 1 | -25.3032 | 13.6152
    550 | 1 | -20.5243 | 11.967
    500 | 1 | -16.2649 | 10.3139
    450 | 1 | -12.5162 | 8.61958
    400 | 1 | -9.27376 | 6.93494
    350 | 1 | -6.52745 | 5.29687
    300 | 1 | -4.26933 | 3.74348
    250 | 1 | -2.49657 | 2.33998
    200 | 1 | -1.2229 | 1.28887
    150 | 1 | -0.392847 | 0.483909
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
Plots
  pg12: PlotGroup1D "Ne V"
    ptgr1: PointGraph | data = cpt2; expr = plas.ne
  pg13: PlotGroup1D "mean energy V"
    ptgr1: PointGraph | data = cpt1; expr = plas.ebar
  pg23: PlotGroup1D "temp V"
    ptgr1: PointGraph | data = cpt2; expr = plas.en
  pg20: PlotGroup2D "Electron Density (plas) 3" | data = dset8
    surf1: Surface | expr = plas.ne
  pg21: PlotGroup2D "Electron Temperature (plas) 3" | data = dset8
    surf1: Surface | expr = plas.Te
  pg24: PlotGroup2D "Metastbles" | data = dset8
    surf1: Surface | expr = plas.n_wHg1; descr = Number density
  pg22: PlotGroup2D "Electric Potential (plas) 3" | data = dset8
    surf1: Surface | expr = V

Exports
  plot1: Plot "Ne V" | filename = /home/comsol/trans/NeV_Hg_span.txt
  plot2: Plot "Mean energy V" | filename = /home/comsol/trans/TeV_Hg_span.txt